<?xml version="1.0"?>
<!-- $Id: LZ-129.xml,v 1.20 2006-11-26 13:36:34 anders Exp $ -->
<!--

  LZ-129 Hindenburg flight model for JSBSim with my LTA patch.

    Copyright (C) 2006  Anders Gidenstam  (anders(at)gidenstam.org)

    This program is free software; you can redistribute it and/or modify
    it under the terms of the GNU General Public License as published by
    the Free Software Foundation; either version 2 of the License, or
    (at your option) any later version.

    This program is distributed in the hope that it will be useful,
    but WITHOUT ANY WARRANTY; without even the implied warranty of
    MERCHANTABILITY or FITNESS FOR A PARTICULAR PURPOSE.  See the
    GNU General Public License for more details.

    You should have received a copy of the GNU General Public License
    along with this program; if not, write to the Free Software
    Foundation, Inc., 59 Temple Place, Suite 330, Boston, MA  02111-1307  USA

-->
<?xml-stylesheet type="text/xsl" href="http://jsbsim.sourceforge.net/JSBSim.xsl"?>
<fdm_config name="LZ-129" version="2.0" release="ALPHA"
 xmlns:xsi="http://www.w3.org/2001/XMLSchema-instance"
 xsi:noNamespaceSchemaLocation="http://jsbsim.sourceforge.net/JSBSim.xsd">

 <fileheader>

  <author> Anders Gidenstam </author>
  <filecreationdate> 2006-03-19 </filecreationdate>
  <version> $Id: LZ-129.xml,v 1.20 2006-11-26 13:36:34 anders Exp $ </version>
  <description>Experimental JSBSim model of the Zeppelin LZ 129.</description>

 </fileheader>

 <!--
  NOTE: The mooring mast coupling at center of the bow is the origo of the
        body coordinate system.
	x/y/z = back/right/up
 -->

 <!--
 ==== Metrics ===============================================================
 -->

 <metrics>

  <wingarea unit="FT2">   0.000000000001 </wingarea> <!-- Totally off! -->
  <wingspan unit="FT">    0.000000000001 </wingspan> <!-- Totally off! -->
  <chord unit="M">        0.0 </chord>               <!-- Totally off! -->
  <htailarea unit="M2"> 500.0 </htailarea>           <!-- Totally off! -->
  <htailarm unit="M">   216.0 </htailarm>            <!-- Totally off! -->
  <vtailarea unit="M2"> 500.0 </vtailarea>           <!-- Totally off! -->
  <vtailarm unit="M"> 0.0 </vtailarm>                <!-- Totally off! -->
  <!-- Total gas volume vol = 200000 m^2 = 7062940 ft^2 -->

  <!-- Aerodynamic Reference Point. Located according to NACA report 432. -->
  <location name="AERORP" unit="M">
   <x> 118.6 </x>
   <y> 0.0 </y>
   <z> 0.0 </z>
  </location>

  <location name="EYEPOINT" unit="M">
   <x> 37.0 </x>
   <y> 0 </y>
   <z> -19.0 </z>
  </location>

  <!-- Visual Reference Point -->
  <location name="VRP" unit="M">
   <x> 100.0 </x>
   <y> 0.0 </y>
   <z> 0.0 </z>
  </location>
 </metrics>


 <!--
 ==== Mass balance ==========================================================
 -->

 <mass_balance>

  <!--
      Mass distribution data from "LZ 130 Graf Zeppelin und das Ende der
      Verkehrsluftschiffahrt", Manfred Bauer and John Duggan,
      Zeppelin Museum Friedrichshafen, 1992.

      Based on a listing of weight savings in the empty weight of LZ 130
      over LZ 129 (page 74). All weights (masses) are in kg.
      The numbers for LZ 129 are inferred based on the listed savings.

      Article                         LZ 130        saving         LZ 129
      Gerippe, Leitwerk, ruder         55460           908          56368  X
      Hulle m. Anstrich & Verkleidung   7924          1095           9019  X
      Zellenanlage                     12895           131          13026  X
      Maschinenanlage[1]               20520         -4819          15701  X
      Elektrische & F.T.-Anlage         3746          1214           3960
      Betriebstoffanlage[2]             2333                         2333
      Wasseranlage[2]                   1422                         1422
      Apparate, Zuge, etc                257                          257
      Verankerung                        915                          915  X
      Fuhrergondel & Steueranlage       1281           -81           1200  X
      Fahrgastraume                     6262          4346          10608  X
      Betriebsraume                     1445           511           1956

      Total                           114460          3305         117765

      X   Accounted for in the model.
      [1] LZ 130 was equipped for water reclamation from the exhaust.
      [2] I assume this is the empty weight of the tanks and pipes.
  -->

  <emptywt unit="KG"> 78413.0 </emptywt>
  <!--
      The empty weight is estimated to consist of
        The structural parts   (Gerippe, Leitwerk, ruder)           56368
        The hull covering      (Hulle m. Anstrich & Verkleidung)     9019
        The (empty) gas cells  (Zellenanlage)                       13026

      The other items in the list above will be represented by point masses.
  -->

  <!--
   % Very rough estimation model of the empty weight CG and inertia tensor.
   % Assume the empty weight of is to 60% a cylindrical shell and
   % to 40% a thin rod (i.e. the keel).
   % The keel is located r meters below the centrum line.

   m = 78413.0 % KG
   r = 20.0    % meter
   l = 245     % meter

   % Very rough estimate of center of gravity (based on the inertial estimate):
   CGx = l / 2
   CGy = 0
   CGz = - 1/6 * pi * r

   % Steiners theorem:
   % Ixx = \bar{Ixx} + m sqrt(\bar{y}^2 + \bar{z}^2)
   % Ixy = \bar{Ixy} + m \bar{x} \bar{y}

   % Very rough estimation model of Ixx, Iyy and Izz relative the CG.
   Ixx = (0.6*m) * r^2 + (0.6*m) * 1/6 * pi * r + \
         (0.4*m) * r * (1 - 1/6*pi)

   Iyy = 1/2*(0.6*m) * r^2 + 1/12*(0.6*m)*l^2 + (0.6*m) * 1/6 * pi * r + \
         1/12*(0.4*m)*l^2 + (0.4*m) * r * (1 - 1/6*pi)

   Izz = 1/2*(0.6*m) * r^2 + 1/12*(0.6*m)*l^2 + \
         1/12*(0.4*m) * l^2

   Ixy = 0
   Ixz = 0
   Iyz = 0

  -->
  <ixx unit="KG*M2">  19611000.0 </ixx>
  <iyy unit="KG*M2"> 402430000.0 </iyy>
  <izz unit="KG*M2"> 401640000.0 </izz>
  <ixy unit="KG*M2">         0.0 </ixy>
  <ixz unit="KG*M2">         0.0 </ixz>
  <iyz unit="KG*M2">         0.0 </iyz>

  <location name="CG" unit="M">
   <x> 122.500 </x>
   <y>   0.000 </y>
   <z> -10.472 </z>
  </location>

  <!--
  === Engines ================================================
  -->
  <pointmass name="Engine 3">
   <!--
        The engine weight according to "The Story of a Zeppelin Mechanic",
        Eugen Bentele, Zeppelin Museum Friedrichshafen, 1992 is
        2200 kg excluding the cooler.
        The total weight of the engine installations in the list above
        indicates a weight of 3925.2 kg per engine.
   -->
   <weight unit="KG"> 3925.2 </weight>
   <location name="POINTMASS" unit="M">
    <x> 105.3 </x>
    <y> -20.25 </y>
    <z> -13.77 </z>
   </location>
  </pointmass>

  <pointmass name="Engine 4">
   <!--
        The engine weight according to "The Story of a Zeppelin Mechanic",
        Eugen Bentele, Zeppelin Museum Friedrichshafen, 1992 is
        2200 kg excluding the cooler.
        The total weight of the engine installations in the list above
        indicates a weight of 3925.2 kg per engine.
   -->
   <weight unit="KG"> 3925.2 </weight>
   <location name="POINTMASS" unit="M">
    <x> 105.3 </x>
    <y> 20.25 </y>
    <z> -13.77 </z>
   </location>
  </pointmass>

  <pointmass name="Engine 1">
   <!--
        The engine weight according to "The Story of a Zeppelin Mechanic",
        Eugen Bentele, Zeppelin Museum Friedrichshafen, 1992 is
        2200 kg excluding the cooler.
        The total weight of the engine installations in the list above
        indicates a weight of 3925.2 kg per engine.
   -->
   <weight unit="KG"> 3925.2 </weight>
   <location name="POINTMASS" unit="M">
    <x> 152.55 </x>
    <y> -15.255 </y>
    <z> -17.82 </z>
   </location>
  </pointmass>

  <pointmass name="Engine 2">
   <!--
        The engine weight according to "The Story of a Zeppelin Mechanic",
        Eugen Bentele, Zeppelin Museum Friedrichshafen, 1992 is
        2200 kg excluding the cooler.
        The total weight of the engine installations in the list above
        indicates a weight of 3925.2 kg per engine.
   -->
   <weight unit="KG"> 3925.2 </weight>
   <location name="POINTMASS" unit="M">
    <x> 152.55 </x>
    <y> 15.255 </y>
    <z> -17.82 </z>
   </location>
  </pointmass>


  <!--
  === Other point masses =====================================
  -->
  <!-- Add fresh/waste water tanks, oil tanks etc here! -->

  <!-- In cell 15 -->

  <pointmass name="Anchor point">
   <weight unit="KG"> 915.0 </weight>
   <location name="POINTMASS" unit="M">
    <x> 0.0 </x>
    <y> 0.0 </y>
    <z> 0.0 </z>
   </location>
  </pointmass>

  <pointmass name="Food storage (max 500KG)">
   <weight unit="KG"> 500.0 </weight>
   <location name="POINTMASS" unit="M">
    <x> 23.22 </x>
    <y> -1.35 </y>
    <z> -12.69 </z>
   </location>
  </pointmass>
  <pointmass name="Food storage (max 500KG)">
   <weight unit="KG"> 500.0 </weight>
   <location name="POINTMASS" unit="M">
    <x> 23.22 </x>
    <y> 1.35 </y>
    <z> -12.69 </z>
   </location>
  </pointmass>

  <!-- In cell 14 -->

  <pointmass name="Control car">
   <weight unit="KG"> 1200.0 </weight>
   <location name="POINTMASS" unit="M">
    <x>  43.2 </x>
    <y>   0.0 </y>
    <z> -20.0 </z>
   </location>
  </pointmass>

  <!-- In cell 13 -->

  <pointmass name="Waste water (max 2500KG)">
   <weight unit="KG"> 2500.0 </weight>
   <location name="POINTMASS" unit="M">
    <x> 50.22 </x>
    <y> 1.215 </y>
    <z> -17.82 </z>
   </location>
  </pointmass>
  <pointmass name="Food storage (max 250KG)">
   <weight unit="KG"> 250.0 </weight>
   <location name="POINTMASS" unit="M">
    <x> 58.05 </x>
    <y> -2.43 </y>
    <z> -18.36 </z>
   </location>
  </pointmass>

  <!-- In cell 12 -->

  <!-- Passenger compartment. -->
  <pointmass name="Passenger compartment port side">
   <weight unit="KG"> 5340 </weight>
   <location name="POINTMASS" unit="M">
    <x>  65.0 </x>
    <y> -10.0 </y>
    <z> -19.575 </z>
   </location>
  </pointmass>
  <pointmass name="Passenger compartment starboard side">
   <weight unit="KG"> 5340.0 </weight>
   <location name="POINTMASS" unit="M">
    <x>  65.0 </x>
    <y>  10.0 </y>
    <z> -19.575 </z>
   </location>
  </pointmass>

  <!-- In cell 11 -->

  <pointmass name="Food storage (max 500KG)">
   <weight unit="KG"> 500.0 </weight>
   <location name="POINTMASS" unit="M">
    <x> 77.76 </x>
    <y> -2.70 </y>
    <z> -19.575 </z>
   </location>
  </pointmass>
  <pointmass name="Fresh water (max 2500KG)">
   <weight unit="KG"> 2500.0 </weight>
   <location name="POINTMASS" unit="M">
    <x> 77.76 </x>
    <y> -1.08 </y>
    <z> -19.575 </z>
   </location>
  </pointmass>

  <!-- In cell 10 -->

  <pointmass name="Fresh water (max 2500KG)">
   <weight unit="KG"> 2500.0 </weight>
   <location name="POINTMASS" unit="M">
    <x> 91.53 </x>
    <y> -1.08 </y>
    <z> -19.71 </z>
   </location>
  </pointmass>

  <!-- In cell 9 -->

  <pointmass name="Freight room (max 500KG)">
   <weight unit="KG"> 500.0 </weight>
   <location name="POINTMASS" unit="M">
    <x> 113.40 </x>
    <y> -1.35 </y>
    <z> -19.98 </z>
   </location>
  </pointmass>
  <pointmass name="Freight room (max 500KG)">
   <weight unit="KG"> 500.0 </weight>
   <location name="POINTMASS" unit="M">
    <x> 113.40 </x>
    <y> 1.35 </y>
    <z> -19.98 </z>
   </location>
  </pointmass>
  <pointmass name="Freight room (max 500KG)">
   <weight unit="KG"> 500.0 </weight>
   <location name="POINTMASS" unit="M">
    <x> 116.10 </x>
    <y> -1.35 </y>
    <z> -19.98 </z>
   </location>
  </pointmass>
  <pointmass name="Freight room (max 500KG)">
   <weight unit="KG"> 500.0 </weight>
   <location name="POINTMASS" unit="M">
    <x> 116.10 </x>
    <y> 1.35 </y>
    <z> -19.98 </z>
   </location>
  </pointmass>

  <!-- In cell 8 -->
  <!-- In cell 7 -->

  <pointmass name="Fresh water (max 2500KG)">
   <weight unit="KG"> 2500.0 </weight>
   <location name="POINTMASS" unit="M">
    <x> 141.21 </x>
    <y> -1.08 </y>
    <z> -18.90 </z>
   </location>
  </pointmass>
  <pointmass name="Oil (max 500KG)">
   <weight unit="KG"> 500.0 </weight>
   <location name="POINTMASS" unit="M">
    <x> 153.36 </x>
    <y> -1.08 </y>
    <z> -18.09 </z>
   </location>
  </pointmass>

  <!-- In cell 6 -->
  <!-- In cell 5 -->

  <pointmass name="Waste water (max 2500KG)">
   <weight unit="KG"> 2500.0 </weight>
   <location name="POINTMASS" unit="M">
    <x> 171.45 </x>
    <y> 1.08 </y>
    <z> -17.01 </z>
   </location>
  </pointmass>

  <!-- In cell 4 -->
  <!-- In cell 3 -->
  <!-- In cell 2 -->
  <!-- In cell 1 -->
  <!-- In cell 0 -->

 </mass_balance>

 <!--
 ==== Ground reactions ======================================================
 -->

 <ground_reactions>

  <!--
  === Landing gears ===================================================
  -->
  <contact type="BOGEY" name="CAR_WHEEL">
   <location unit="M">
    <x>  43.2 </x>
    <y>   0.0 </y>
    <z> -22.41 </z>
   </location>
   <static_friction>  0.8 </static_friction>
   <dynamic_friction> 0.5 </dynamic_friction>
   <rolling_friction> 0.02 </rolling_friction>
   <spring_coeff unit="N/M">      250000 </spring_coeff>
   <damping_coeff unit="N/M/SEC"> 2500000 </damping_coeff>
   <max_steer unit="DEG"> 0.0 </max_steer>
   <brake_group> NONE </brake_group>
   <retractable>0</retractable>
  </contact>

  <contact type="BOGEY" name="LOWER_FIN_WHEEL">
   <location unit="M">
    <x> 210.0 </x>
    <y>   0.0 </y>
    <z> -23.5 </z>
   </location>
   <static_friction>  0.8 </static_friction>
   <dynamic_friction> 0.5 </dynamic_friction>
   <rolling_friction> 0.02 </rolling_friction>
   <spring_coeff unit="N/M">      250000 </spring_coeff>
   <damping_coeff unit="N/M/SEC"> 2500000 </damping_coeff>
   <max_steer unit="DEG"> 0.0 </max_steer>
   <brake_group> NONE </brake_group>
   <retractable>0</retractable>
  </contact>

  <!--
  === Other contact points ============================================
  -->
  <!-- These should induce structural failure. -->
  <contact type="BOGEY" name="NOSE">
   <location unit="M">
    <x> 0.0 </x>
    <y> 0.0 </y>
    <z> 0.0 </z>
   </location>
   <static_friction>  0.2 </static_friction>
   <dynamic_friction> 0.2 </dynamic_friction>
   <rolling_friction> 0.2 </rolling_friction>
   <spring_coeff unit="N/M">      1000000 </spring_coeff>
   <damping_coeff unit="N/M/SEC"> 1000000 </damping_coeff>
   <max_steer unit="DEG"> 0.0 </max_steer>
   <brake_group> NONE </brake_group>
   <retractable>0</retractable>
  </contact>

  <contact type="BOGEY" name="TAIL">
   <location unit="M">
    <x> 245.430 </x>
    <y>   0.0 </y>
    <z>   0.0 </z>
   </location>
   <static_friction>  0.2 </static_friction>
   <dynamic_friction> 0.2 </dynamic_friction>
   <rolling_friction> 0.2 </rolling_friction>
   <spring_coeff unit="N/M">      1000000 </spring_coeff>
   <damping_coeff unit="N/M/SEC"> 1000000 </damping_coeff>
   <max_steer unit="DEG"> 0.0 </max_steer>
   <brake_group> NONE </brake_group>
   <retractable>0</retractable>
  </contact>

 </ground_reactions>

 <!--
 ==== Propulsion ============================================================
 -->

 <propulsion>

  <!--
  === Engines ===============================================
  -->
  <!--
       Engine data from "The Story of a Zeppelin Mechanic", Eugen Bentele,
       Zeppelin Museum Friedrichshafen, 1992.

       Manufacturer:        Daimler Bentz AG
       Type:                LOF 6 (DB 602) (Diesel)
       No. cylinders:       V 16
       Max power:           1050 HP
       Max rpm:             1500 rpm
       Cruise power:        940 HP
       Cruise rpm:          1350 rpm
       Swpet volume:        88 dm3
       Weight (w/o cooler): 2200 kg
       Power/weight ration: 2.8 kg/kWh
       Fuel consumption (cruise): 0.225 kg/kWh
       Piston diameter:     175 mm
       Piston stroke:       230 mm
       Compression ration:  1:16
       Reduction gear:      2:1
       Propeller diameter:  6.0 m
       Propeller rpm (cruise): 625 rpm

       Notes: 2 input, 2 output valves. No supercharger. Could rotate
              in either dricetion. Compressed air starter.
  -->
  <!--
      Engine data from "LZ 130 Graf Zeppelin und das Ende der
      Verkehrsluftschiffahrt", Manfred Bauer and John Duggan,
      Zeppelin Museum Friedrichshafen, 1992.

      Daimler Bentz LOF 6
      Max power:            885 kW (1200 HP) at 1600 rpm
      Cruise power:         660 kW (900 HP) at 1400 rpm

      Diesel consumption:   max 245 g/kWh (180 g/HPh)
      Lub. oil consumption: max   4 g/kWh (3 g/HPh)

      Total diesel fuel:    ca 80000 dm^3
      Total lub. oil:       ca  4500 dm^3
  -->
  <!--
       NOTE: As a temporary measure the engines are borrowed from the
             Boeing 314A.
             The engine type is WrightGR-2600 instead of the
	     Daimler-Benz DB 620 it should be.
  -->

  <!-- Engine 1 -->
  <engine file="WrightGR-2600">
   <location unit="M">
    <x> 152.55 </x>
    <y> -15.255 </y>
    <z> -17.82 </z>
   </location>
   <orient unit="DEG">
    <roll> 0.0 </roll>
    <pitch> 0 </pitch>
    <yaw> 0 </yaw>
   </orient>
   <feed>0</feed>
   <feed>1</feed>
   <feed>2</feed>
   <feed>3</feed>
   <feed>4</feed>
   <feed>5</feed>
   <feed>6</feed>
   <feed>7</feed>
   <feed>8</feed>
   <feed>9</feed>
   <feed>10</feed>
   <feed>11</feed>
   <feed>12</feed>
   <feed>13</feed>
   <feed>14</feed>
   <feed>15</feed>
   <feed>16</feed>
   <feed>17</feed>
   <feed>18</feed>
   <feed>19</feed>
   <feed>20</feed>
   <feed>21</feed>
   <feed>22</feed>
   <feed>23</feed>
   <feed>24</feed>
   <feed>25</feed>
   <feed>26</feed>
   <feed>27</feed>
   <feed>28</feed>
   <feed>29</feed>
   <feed>30</feed>
   <feed>31</feed>
   <feed>32</feed>
   <feed>33</feed>
   <feed>34</feed>
   <feed>35</feed>
   <feed>36</feed>
   <feed>37</feed>
   <thruster file="HamiltonStd6243A-3">
    <location unit="M">
     <x> 152.55 </x>
     <y> -15.255 </y>
     <z> -17.82 </z>
    </location>
    <orient unit="DEG">
     <roll> 0.0 </roll>
     <pitch> 0.0 </pitch>
     <yaw> 0.0 </yaw>
    </orient>
   </thruster>
  </engine>

  <!-- Engine 2 -->
  <engine file="WrightGR-2600">
   <location unit="M">
    <x> 152.55 </x>
    <y> 15.255 </y>
    <z> -17.82 </z>
   </location>
   <orient unit="DEG">
    <roll> 0.0 </roll>
    <pitch> 0 </pitch>
    <yaw> 0 </yaw>
   </orient>
   <feed>0</feed>
   <feed>1</feed>
   <feed>2</feed>
   <feed>3</feed>
   <feed>4</feed>
   <feed>5</feed>
   <feed>6</feed>
   <feed>7</feed>
   <feed>8</feed>
   <feed>9</feed>
   <feed>10</feed>
   <feed>11</feed>
   <feed>12</feed>
   <feed>13</feed>
   <feed>14</feed>
   <feed>15</feed>
   <feed>16</feed>
   <feed>17</feed>
   <feed>18</feed>
   <feed>19</feed>
   <feed>20</feed>
   <feed>21</feed>
   <feed>22</feed>
   <feed>23</feed>
   <feed>24</feed>
   <feed>25</feed>
   <feed>26</feed>
   <feed>27</feed>
   <feed>28</feed>
   <feed>29</feed>
   <feed>30</feed>
   <feed>31</feed>
   <feed>32</feed>
   <feed>33</feed>
   <feed>34</feed>
   <feed>35</feed>
   <feed>36</feed>
   <feed>37</feed>
   <thruster file="HamiltonStd6243A-3">
    <location unit="M">
     <x> 152.55 </x>
     <y> 15.255 </y>
     <z> -17.82 </z>
    </location>
    <orient unit="DEG">
     <roll> 0.0 </roll>
     <pitch> 0.0 </pitch>
     <yaw> 0.0 </yaw>
    </orient>
   </thruster>
  </engine>

  <!-- Engine 3 -->
  <engine file="WrightGR-2600">
   <location unit="M">
    <x> 105.3 </x>
    <y> -20.25 </y>
    <z> -13.77 </z>
   </location>
   <orient unit="DEG">
    <roll> 0.0 </roll>
    <pitch> 0 </pitch>
    <yaw> 0 </yaw>
   </orient>
   <feed>0</feed>
   <feed>1</feed>
   <feed>2</feed>
   <feed>3</feed>
   <feed>4</feed>
   <feed>5</feed>
   <feed>6</feed>
   <feed>7</feed>
   <feed>8</feed>
   <feed>9</feed>
   <feed>10</feed>
   <feed>11</feed>
   <feed>12</feed>
   <feed>13</feed>
   <feed>14</feed>
   <feed>15</feed>
   <feed>16</feed>
   <feed>17</feed>
   <feed>18</feed>
   <feed>19</feed>
   <feed>20</feed>
   <feed>21</feed>
   <feed>22</feed>
   <feed>23</feed>
   <feed>24</feed>
   <feed>25</feed>
   <feed>26</feed>
   <feed>27</feed>
   <feed>28</feed>
   <feed>29</feed>
   <feed>30</feed>
   <feed>31</feed>
   <feed>32</feed>
   <feed>33</feed>
   <feed>34</feed>
   <feed>35</feed>
   <feed>36</feed>
   <feed>37</feed>
   <thruster file="HamiltonStd6243A-3">
    <location unit="M">
     <x> 105.3 </x>
     <y> -20.25 </y>
     <z> -13.77 </z>
    </location>
    <orient unit="DEG">
     <roll> 0.0 </roll>
     <pitch> 0.0 </pitch>
     <yaw> 0.0 </yaw>
    </orient>
   </thruster>
  </engine>

  <!-- Engine 4 -->
  <engine file="WrightGR-2600">
   <location unit="M">
    <x> 105.3 </x>
    <y> 20.25 </y>
    <z> -13.77 </z>
   </location>
   <orient unit="DEG">
    <roll> 0.0 </roll>
    <pitch> 0 </pitch>
    <yaw> 0 </yaw>
   </orient>
   <feed>0</feed>
   <feed>1</feed>
   <feed>2</feed>
   <feed>3</feed>
   <feed>4</feed>
   <feed>5</feed>
   <feed>6</feed>
   <feed>7</feed>
   <feed>8</feed>
   <feed>9</feed>
   <feed>10</feed>
   <feed>11</feed>
   <feed>12</feed>
   <feed>13</feed>
   <feed>14</feed>
   <feed>15</feed>
   <feed>16</feed>
   <feed>17</feed>
   <feed>18</feed>
   <feed>19</feed>
   <feed>20</feed>
   <feed>21</feed>
   <feed>22</feed>
   <feed>23</feed>
   <feed>24</feed>
   <feed>25</feed>
   <feed>26</feed>
   <feed>27</feed>
   <feed>28</feed>
   <feed>29</feed>
   <feed>30</feed>
   <feed>31</feed>
   <feed>32</feed>
   <feed>33</feed>
   <feed>34</feed>
   <feed>35</feed>
   <feed>36</feed>
   <feed>37</feed>
   <thruster file="HamiltonStd6243A-3">
    <location unit="M">
     <x> 105.3 </x>
     <y> 20.25 </y>
     <z> -13.77 </z>
    </location>
    <orient unit="DEG">
     <roll> 0.0 </roll>
     <pitch> 0.0 </pitch>
     <yaw> 0.0 </yaw>
    </orient>
   </thruster>
  </engine>

  <!--
  === Fuel tanks ============================================
  -->

  <!-- Fuel tanks along the keel walk way -->

  <!--
       NOTE: The capacity numbers should be in liters
             Assumption: 1 liter (= 0.001 m^3) = 1 kg
  -->

  <!-- In cell 15 -->

  <tank type="FUEL">
   <location unit="M">
    <x> 18.090 </x>
    <y> -1.080 </y>
    <z> -12.420 </z>
   </location>
   <capacity unit="KG"> 1250 </capacity>
   <contents unit="KG"> 1250 </contents>
  </tank>
  <tank type="FUEL">
   <location unit="M">
    <x> 18.090 </x>
    <y> 1.080 </y>
    <z> -12.420 </z>
   </location>
   <capacity unit="KG"> 1250 </capacity>
   <contents unit="KG"> 1250 </contents>
  </tank>
  <tank type="FUEL">
   <location unit="M">
    <x> 25.650 </x>
    <y> -1.080 </y>
    <z> -12.960 </z>
   </location>
   <capacity unit="KG"> 2500 </capacity>
   <contents unit="KG"> 2500 </contents>
  </tank>
  <tank type="FUEL">
   <location unit="M">
    <x> 25.650 </x>
    <y> 1.080 </y>
    <z> -12.960 </z>
   </location>
   <capacity unit="KG"> 2500 </capacity>
   <contents unit="KG"> 2500 </contents>
  </tank>
  <tank type="FUEL">
   <location unit="M">
    <x> 28.080 </x>
    <y> -1.080 </y>
    <z> -13.500 </z>
   </location>
   <capacity unit="KG"> 2500 </capacity>
   <contents unit="KG"> 2500 </contents>
  </tank>

  <!-- In cell 13 -->

  <tank type="FUEL">
   <location unit="M">
    <x> 50.220 </x>
    <y> -1.215 </y>
    <z> -17.820 </z>
   </location>
   <capacity unit="KG"> 2500 </capacity>
   <contents unit="KG"> 2500 </contents>
  </tank>
  <tank type="FUEL">
   <location unit="M">
    <x> 52.650 </x>
    <y> -1.215 </y>
    <z> -18.090 </z>
   </location>
   <capacity unit="KG"> 2500 </capacity>
   <contents unit="KG"> 2500 </contents>
  </tank>
  <tank type="FUEL">
   <location unit="M">
    <x> 52.650 </x>
    <y>  1.215 </y>
    <z> -18.090 </z>
   </location>
   <capacity unit="KG"> 2500 </capacity>
   <contents unit="KG"> 2500 </contents>
  </tank>
  <tank type="FUEL">
   <location unit="M">
    <x> 55.350 </x>
    <y> -1.215 </y>
    <z> -18.360 </z>
   </location>
   <capacity unit="KG"> 2500 </capacity>
   <contents unit="KG"> 2500 </contents>
  </tank>
  <tank type="FUEL">
   <location unit="M">
    <x> 55.350 </x>
    <y>  1.215 </y>
    <z> -18.360 </z>
   </location>
   <capacity unit="KG"> 2500 </capacity>
   <contents unit="KG"> 2500 </contents>
  </tank>

  <!-- In cell 11 -->

  <tank type="FUEL">
   <location unit="M">
    <x> 77.760 </x>
    <y>  1.080 </y>
    <z> -19.575 </z>
   </location>
   <capacity unit="KG"> 2500 </capacity>
   <contents unit="KG"> 2500 </contents>
  </tank>
  <tank type="FUEL">
   <location unit="M">
    <x> 86.130 </x>
    <y> -1.080 </y>
    <z> -19.710 </z>
   </location>
   <capacity unit="KG"> 2500 </capacity>
   <contents unit="KG"> 2500 </contents>
  </tank>
  <tank type="FUEL">
   <location unit="M">
    <x> 86.130 </x>
    <y>  1.080 </y>
    <z> -19.710 </z>
   </location>
   <capacity unit="KG"> 2500 </capacity>
   <contents unit="KG"> 2500 </contents>
  </tank>


  <!-- In cell 10 -->

  <tank type="FUEL">
   <location unit="M">
    <x> 91.530 </x>
    <y>  1.080 </y>
    <z> -19.710 </z>
   </location>
   <capacity unit="KG"> 2500 </capacity>
   <contents unit="KG"> 2500 </contents>
  </tank>
  <tank type="FUEL">
   <location unit="M">
    <x> 94.500 </x>
    <y> -1.080 </y>
    <z> -19.710 </z>
   </location>
   <capacity unit="KG"> 2500 </capacity>
   <contents unit="KG"> 2500 </contents>
  </tank>

  <!-- In cell 9 -->

  <tank type="FUEL">
   <location unit="M">
    <x> 110.970 </x>
    <y> -1.080 </y>
    <z> -19.710 </z>
   </location>
   <capacity unit="KG"> 2500 </capacity>
   <contents unit="KG"> 2500 </contents>
  </tank>
  <tank type="FUEL">
   <location unit="M">
    <x> 119.070 </x>
    <y> -1.080 </y>
    <z> -19.710 </z>
   </location>
   <capacity unit="KG"> 2500 </capacity>
   <contents unit="KG"> 2500 </contents>
  </tank>
  <tank type="FUEL">
   <location unit="M">
    <x> 119.070 </x>
    <y>  1.080 </y>
    <z> -19.710 </z>
   </location>
   <capacity unit="KG"> 2500 </capacity>
   <contents unit="KG"> 2500 </contents>
  </tank>
  <tank type="FUEL">
   <location unit="M">
    <x> 121.770 </x>
    <y>  1.080 </y>
    <z> -19.575 </z>
   </location>
   <capacity unit="KG"> 2500 </capacity>
   <contents unit="KG"> 2500 </contents>
  </tank>

  <!-- In cell 8 -->

  <tank type="FUEL">
   <location unit="M">
    <x> 125.280 </x>
    <y> -1.080 </y>
    <z> -19.440 </z>
   </location>
   <capacity unit="KG"> 2500 </capacity>
   <contents unit="KG"> 2500 </contents>
  </tank>
  <tank type="FUEL">
   <location unit="M">
    <x> 127.710 </x>
    <y> -1.080 </y>
    <z> -19.440 </z>
   </location>
   <capacity unit="KG"> 2500 </capacity>
   <contents unit="KG"> 2500 </contents>
  </tank>
  <tank type="FUEL">
   <location unit="M">
    <x> 127.710 </x>
    <y> 1.080 </y>
    <z> -19.440 </z>
   </location>
   <capacity unit="KG"> 2500 </capacity>
   <contents unit="KG"> 2500 </contents>
  </tank>
  <tank type="FUEL">
   <location unit="M">
    <x> 136.080 </x>
    <y> 1.080 </y>
    <z> -18.900 </z>
   </location>
   <capacity unit="KG"> 2500 </capacity>
   <contents unit="KG"> 2500 </contents>
  </tank>
  <tank type="FUEL">
   <location unit="M">
    <x> 136.080 </x>
    <y> -1.080 </y>
    <z> -18.900 </z>
   </location>
   <capacity unit="KG"> 2500 </capacity>
   <contents unit="KG"> 2500 </contents>
  </tank>
  <tank type="FUEL">
   <location unit="M">
    <x> 138.780 </x>
    <y> -1.080 </y>
    <z> -18.900 </z>
   </location>
   <capacity unit="KG"> 2500 </capacity>
   <contents unit="KG"> 2500 </contents>
  </tank>

  <!-- In cell 7 -->

  <tank type="FUEL">
   <location unit="M">
    <x> 141.210 </x>
    <y> 1.080 </y>
    <z> -18.900 </z>
   </location>
   <capacity unit="KG"> 2500 </capacity>
   <contents unit="KG"> 2500 </contents>
  </tank>
  <tank type="FUEL">
   <location unit="M">
    <x> 143.910 </x>
    <y> -1.080 </y>
    <z> -18.900 </z>
   </location>
   <capacity unit="KG"> 2500 </capacity>
   <contents unit="KG"> 2500 </contents>
  </tank>
  <tank type="FUEL">
   <location unit="M">
    <x> 143.910 </x>
    <y> 1.080 </y>
    <z> -18.900 </z>
   </location>
   <capacity unit="KG"> 2500 </capacity>
   <contents unit="KG"> 2500 </contents>
  </tank>

  <!-- In cell 6 -->

  <tank type="FUEL">
   <location unit="M">
    <x> 156.870 </x>
    <y> -1.080 </y>
    <z> -18.090 </z>
   </location>
   <capacity unit="KG"> 850 </capacity>
   <contents unit="KG"> 850 </contents>
  </tank>
  <tank type="FUEL">
   <location unit="M">
    <x> 156.870 </x>
    <y> 1.080 </y>
    <z> -18.090 </z>
   </location>
   <capacity unit="KG"> 850 </capacity>
   <contents unit="KG"> 850 </contents>
  </tank>
  <tank type="FUEL">
   <location unit="M">
    <x> 166.320 </x>
    <y> -1.080 </y>
    <z> -17.415 </z>
   </location>
   <capacity unit="KG"> 2500 </capacity>
   <contents unit="KG"> 2500 </contents>
  </tank>
  <tank type="FUEL">
   <location unit="M">
    <x> 166.320 </x>
    <y> 1.080 </y>
    <z> -17.415 </z>
   </location>
   <capacity unit="KG"> 2500 </capacity>
   <contents unit="KG"> 2500 </contents>
  </tank>

  <!-- In cell 5 -->

  <tank type="FUEL">
   <location unit="M">
    <x> 171.450 </x>
    <y> -1.080 </y>
    <z> -17.010 </z>
   </location>
   <capacity unit="KG"> 2500 </capacity>
   <contents unit="KG"> 2500 </contents>
  </tank>
  <tank type="FUEL">
   <location unit="M">
    <x> 183.870 </x>
    <y> -1.080 </y>
    <z> -15.390 </z>
   </location>
   <capacity unit="KG"> 2500 </capacity>
   <contents unit="KG"> 2500 </contents>
  </tank>
  <tank type="FUEL">
   <location unit="M">
    <x> 183.870 </x>
    <y> 1.080 </y>
    <z> -15.390 </z>
   </location>
   <capacity unit="KG"> 2500 </capacity>
   <contents unit="KG"> 2500 </contents>
  </tank>

  <!-- In cell 4 -->

  <tank type="FUEL">
   <location unit="M">
    <x> 186.840 </x>
    <y> -1.080 </y>
    <z> -14.850 </z>
   </location>
   <capacity unit="KG"> 2500 </capacity>
   <contents unit="KG"> 2500 </contents>
  </tank>
  <tank type="FUEL">
   <location unit="M">
    <x> 196.560 </x>
    <y> -1.080 </y>
    <z> -12.960 </z>
   </location>
   <capacity unit="KG"> 1250 </capacity>
   <contents unit="KG"> 1250 </contents>
  </tank>
  <tank type="FUEL">
   <location unit="M">
    <x> 196.560 </x>
    <y> 1.080 </y>
    <z> -12.960 </z>
   </location>
   <capacity unit="KG"> 1250 </capacity>
   <contents unit="KG"> 1250 </contents>
  </tank>

  <!--
  === Gas cells ==============================================
  -->

  <!-- Cell 1 -->
  <gas_cell type="HYDROGEN">
   <location unit="M">
    <x> 235.7 </x>
    <y> 0.0 </y>
    <z> 5.0 </z>
   </location>
   <x_width unit="M"> 16.2 </x_width>
   <y_radius unit="M"> 4.93 </y_radius>
   <z_radius unit="M"> 4.93 </z_radius>
   <max_overpressure unit="Pa"> 10.0 </max_overpressure>
   <valve_coefficient unit="M4*SEC/KG"> 0.02 </valve_coefficient>
  </gas_cell>

  <!-- Cell 2 -->
  <gas_cell type="HYDROGEN">
   <location unit="M">
    <x> 220.7 </x>
    <y> 0.0 </y>
    <z> 5.0 </z>
   </location>
   <x_width unit="M"> 13.77 </x_width>
   <y_radius unit="M"> 9.52 </y_radius>
   <z_radius unit="M"> 9.52 </z_radius>
   <max_overpressure unit="Pa"> 10.0 </max_overpressure>
   <valve_coefficient unit="M4*SEC/KG"> 0.02 </valve_coefficient>
  </gas_cell>

  <!-- Cell 3 -->
  <gas_cell type="HYDROGEN">
   <location unit="M">
    <x> 207.1 </x>
    <y> 0.0 </y>
    <z> 5.0 </z>
   </location>
   <x_width unit="M"> 13.50 </x_width>
   <y_radius unit="M"> 12.56 </y_radius>
   <z_radius unit="M"> 12.56 </z_radius>
   <max_overpressure unit="Pa"> 10.0 </max_overpressure>
   <valve_coefficient unit="M4*SEC/KG"> 0.02 </valve_coefficient>
  </gas_cell>

  <!-- Cell 4 -->
  <gas_cell type="HYDROGEN">
   <location unit="M">
    <x> 192.78 </x>
    <y> 0.0 </y>
    <z> 5.0 </z>
   </location>
   <x_width unit="M"> 15.12 </x_width>
   <y_radius unit="M"> 15.12 </y_radius>
   <z_radius unit="M"> 15.12 </z_radius>
   <max_overpressure unit="Pa"> 10.0 </max_overpressure>
   <valve_coefficient unit="M4*SEC/KG"> 0.02 </valve_coefficient>
  </gas_cell>

  <!-- Cell 5 -->
  <gas_cell type="HYDROGEN">
   <location unit="M">
    <x> 177.66 </x>
    <y> 0.0 </y>
    <z> 5.0 </z>
   </location>
   <x_width unit="M"> 15.12 </x_width>
   <y_radius unit="M"> 17.145 </y_radius>
   <z_radius unit="M"> 17.145 </z_radius>
   <max_overpressure unit="Pa"> 10.0 </max_overpressure>
   <valve_coefficient unit="M4*SEC/KG"> 0.02 </valve_coefficient>
  </gas_cell>

  <!-- Cell 6 -->
  <gas_cell type="HYDROGEN">
   <location unit="M">
    <x> 162.61 </x>
    <y> 0.0 </y>
    <z> 5.0 </z>
   </location>
   <x_width unit="M"> 14.985 </x_width>
   <y_radius unit="M"> 18.56 </y_radius>
   <z_radius unit="M"> 18.56 </z_radius>
   <max_overpressure unit="Pa"> 10.0 </max_overpressure>
   <valve_coefficient unit="M4*SEC/KG"> 0.02 </valve_coefficient>
  </gas_cell>

  <!-- Cell 7 -->
  <gas_cell type="HYDROGEN">
   <location unit="M">
    <x> 147.62 </x>
    <y> 0.0 </y>
    <z> 5.0 </z>
   </location>
   <x_width unit="M"> 14.985 </x_width>
   <y_radius unit="M"> 19.51 </y_radius>
   <z_radius unit="M"> 19.51 </z_radius>
   <max_overpressure unit="Pa"> 10.0 </max_overpressure>
   <valve_coefficient unit="M4*SEC/KG"> 0.02 </valve_coefficient>
  </gas_cell>

  <!-- Cell 8 -->
  <gas_cell type="HYDROGEN">
   <location unit="M">
    <x> 131.76 </x>
    <y> 0.0 </y>
    <z> 5.0 </z>
   </location>
   <x_width unit="M"> 16.74 </x_width>
   <y_radius unit="M"> 20.12 </y_radius>
   <z_radius unit="M"> 20.12 </z_radius>
   <max_overpressure unit="Pa"> 10.0 </max_overpressure>
   <valve_coefficient unit="M4*SEC/KG"> 0.02 </valve_coefficient>
  </gas_cell>

  <!-- Cell 9 -->
  <gas_cell type="HYDROGEN">
   <location unit="M">
    <x> 115.16 </x>
    <y> 0.0 </y>
    <z> 5.0 </z>
   </location>
   <x_width unit="M"> 16.47 </x_width>
   <y_radius unit="M"> 20.52 </y_radius>
   <z_radius unit="M"> 20.52 </z_radius>
   <max_overpressure unit="Pa"> 10.0 </max_overpressure>
   <valve_coefficient unit="M4*SEC/KG"> 0.02 </valve_coefficient>
  </gas_cell>

  <!-- Cell 10 -->
  <gas_cell type="HYDROGEN">
   <location unit="M">
    <x> 98.69 </x>
    <y> 0.0 </y>
    <z> 5.0 </z>
   </location>
   <x_width unit="M"> 16.47 </x_width>
   <y_radius unit="M"> 20.66 </y_radius>
   <z_radius unit="M"> 20.66 </z_radius>
   <max_overpressure unit="Pa"> 10.0 </max_overpressure>
   <valve_coefficient unit="M4*SEC/KG"> 0.02 </valve_coefficient>
  </gas_cell>

  <!-- Cell 11 -->
  <gas_cell type="HYDROGEN">
   <location unit="M">
    <x> 82.15 </x>
    <y> 0.0 </y>
    <z> 5.0 </z>
   </location>
   <x_width unit="M"> 16.61 </x_width>
   <y_radius unit="M"> 20.45 </y_radius>
   <z_radius unit="M"> 20.45 </z_radius>
   <max_overpressure unit="Pa"> 10.0 </max_overpressure>
   <valve_coefficient unit="M4*SEC/KG"> 0.02 </valve_coefficient>
  </gas_cell>

  <!-- Cell 12 -->
  <gas_cell type="HYDROGEN">
   <location unit="M">
    <x> 66.42 </x>
    <y> 0.0 </y>
    <z> 5.0 </z>
   </location>
   <x_width unit="M"> 14.85 </x_width>
   <y_radius unit="M"> 19.91 </y_radius>
   <z_radius unit="M"> 19.91 </z_radius>
   <max_overpressure unit="Pa"> 10.0 </max_overpressure>
   <valve_coefficient unit="M4*SEC/KG"> 0.02 </valve_coefficient>
  </gas_cell>

  <!-- Cell 13 -->
  <gas_cell type="HYDROGEN">
   <location unit="M">
    <x> 51.50 </x>
    <y> 0.0 </y>
    <z> 5.0 </z>
   </location>
   <x_width unit="M"> 14.985 </x_width>
   <y_radius unit="M"> 18.90 </y_radius>
   <z_radius unit="M"> 18.90 </z_radius>
   <max_overpressure unit="Pa"> 10.0 </max_overpressure>
   <valve_coefficient unit="M4*SEC/KG"> 0.02 </valve_coefficient>
  </gas_cell>

  <!-- Cell 14 -->
  <gas_cell type="HYDROGEN">
   <location unit="M">
    <x> 36.59 </x>
    <y> 0.0 </y>
    <z> 5.0 </z>
   </location>
   <x_width unit="M"> 14.85 </x_width>
   <y_radius unit="M"> 17.08 </y_radius>
   <z_radius unit="M"> 17.08 </z_radius>
   <max_overpressure unit="Pa"> 10.0 </max_overpressure>
   <valve_coefficient unit="M4*SEC/KG"> 0.02 </valve_coefficient>
  </gas_cell>

  <!-- Cell 15 -->
  <gas_cell type="HYDROGEN">
   <location unit="M">
    <x> 21.74 </x>
    <y> 0.0 </y>
    <z> 5.0 </z>
   </location>
   <x_width unit="M"> 14.85 </x_width>
   <y_radius unit="M"> 13.77 </y_radius>
   <z_radius unit="M"> 13.77 </z_radius>
   <max_overpressure unit="Pa"> 10.0 </max_overpressure>
   <valve_coefficient unit="M4*SEC/KG"> 0.02 </valve_coefficient>
  </gas_cell>

  <!-- Cell 16 -->
  <gas_cell type="HYDROGEN">
   <location unit="M">
    <x> 8.64 </x>
    <y> 0.0 </y>
    <z> 5.0 </z>
   </location>
   <x_width unit="M"> 11.34 </x_width>
   <y_radius unit="M"> 7.63 </y_radius>
   <z_radius unit="M"> 7.63 </z_radius>
   <max_overpressure unit="Pa"> 10.0 </max_overpressure>
   <valve_coefficient unit="M4*SEC/KG"> 0.02 </valve_coefficient>
  </gas_cell>

  <!--
  === Ballast ================================================
  -->
  <!-- Experimental ballast setup. -->
  <!-- Forward ballast -->
  <ballast type="WATER">
   <location unit="M">
    <x> 20.0 </x>
    <y> 0.0 </y>
    <z> -20.0 </z>
   </location>
   <capacity unit="KG"> 200000 </capacity>
   <contents unit="KG">  14000 </contents>
  </ballast>
  <!-- Aft ballast -->
  <ballast type="WATER">
   <location unit="M">
    <x> 220.0 </x>
    <y> 0.0 </y>
    <z> -20.0 </z>
   </location>
   <capacity unit="KG"> 200000 </capacity>
   <contents unit="KG">   8250 </contents>
  </ballast>
  <!-- Center ballast -->
  <ballast type="WATER">
   <location unit="M">
    <x> 122.5 </x>
    <y> 0.0 </y>
    <z> -20.0 </z>
   </location>
   <capacity unit="KG"> 200000 </capacity>
   <contents unit="KG">  18000 </contents>
  </ballast>

 </propulsion>

 <!--
 ==== Flight control system =================================================
 -->

 <autopilot file="LZ-129_crew_ap"/>

 <flight_control name="FGFCS">

  <!--
  === Pitch ==================================================
  -->
  <channel name="Pitch">
   <summer name="Pitch Trim Sum">
    <input>fcs/elevator-cmd-norm</input>
    <input>fcs/pitch-trim-cmd-norm</input>
    <input>ap/elevator-cmd-norm</input>
    <clipto>
     <min>-1</min>
     <max>1</max>
    </clipto>
   </summer>

   <aerosurface_scale name="Elevator Control">
    <input>fcs/pitch-trim-sum</input>
    <gain>0.5236</gain>
    <domain>
     <min>-1</min>
     <max>1</max>
    </domain>
    <range>
     <min>-0.5236</min>
     <max>0.5236</max>
    </range>
    <output>fcs/elevator-pos-rad</output>
   </aerosurface_scale>

   <aerosurface_scale name="Elevator Position Normalized">
    <input>fcs/elevator-pos-rad</input>
    <gain>1.9099</gain>
    <domain>
     <min>-0.5236</min>
     <max>0.5236</max>
    </domain>
    <range>
     <min>-1</min>
     <max>1</max>
    </range>
    <output>fcs/elevator-pos-norm</output>
   </aerosurface_scale>
  </channel>

  <!--
  === Yaw ====================================================
  -->
  <channel name="Yaw">
   <summer name="Yaw Trim Sum">
    <input>fcs/rudder-cmd-norm</input>
    <input>fcs/yaw-trim-cmd-norm</input>
    <input>ap/rudder-cmd-norm</input>
    <clipto>
     <min>-1</min>
     <max>1</max>
    </clipto>
   </summer>

   <aerosurface_scale name="Rudder Control">
    <input>fcs/yaw-trim-sum</input>
    <gain>0.5236</gain>
    <domain>
     <min>-1</min>
     <max>1</max>
    </domain>
    <range>
     <min>-0.5236</min>
     <max>0.5236</max>
    </range>
    <output>fcs/rudder-pos-rad</output>
   </aerosurface_scale>

   <aerosurface_scale name="Rudder Position Normalized">
    <input>fcs/rudder-pos-rad</input>
    <gain>1.9099</gain>
    <domain>
     <min>-0.5236</min>
     <max>0.5236</max>
    </domain>
    <range>
     <min>-1</min>
     <max>1</max>
    </range>
    <output>fcs/rudder-pos-norm</output>
   </aerosurface_scale>

  </channel>

 </flight_control>

 <!--
 ==== Aerodynamics ==========================================================
 -->

 <aerodynamics>

  <!--
  === Forces =================================================
  -->

  <!-- ================================================== -->
  <axis name="DRAG">

   <function name="aero/coefficient/CDalpha">
    <description>Drag_due_to_alpha_and_elevators</description>
    <!-- Based on NACA report 432 "Force measurements on a 1/40-scale model
         of the U.S. Airship Akron" by Hugh B. Freeman,
	 Table III-a hull with mk II tail surfaces.
	 I have made the additional assumption that the coefficients are
	 symmetric for positive and negative alpha and used q = 19.0.
	 This table includes drag at zero alpha and drag due to elevator
	 deflection.

	   CD = D / (q * (vol)^(2/3))

    -->
    <product>
     <property>aero/qbar-psf</property>
     <value> 36812.1 </value>
     <!-- Start CD = -->
     <table>
      <independentVar lookup="row">fcs/elevator-pos-deg</independentVar>
      <independentVar lookup="column">aero/alpha-deg</independentVar>
      <tableData>
             -3.0    0.0     3.0    6.0    9.0    12.0   15.0   18.0   20.0
       -20   0.0383  0.0332  0.0319 0.0345 0.0432 0.0569 0.0797 0.1085 0.1315
       -15   0.0344  0.0301  0.0297 0.0320 0.0412 0.0556 0.0790 0.1093 0.1357
       -10   0.0310  0.0275  0.0280 0.0311 0.0410 0.0683 0.0806 0.1127 0.1401
       -5    0.0281  0.0255  0.0268 0.0311 0.0418 0.0570 0.0839 0.1178 0.1455
       0     0.0261  0.0342  0.0268 0.0318 0.0435 0.0608 0.0871 0.1238 0.1538
       5     0.0265  0.0256  0.0285 0.0343 0.0470 0.0658 0.0941 0.1321 0.1632
       10    0.0282  0.0278  0.0316 0.0383 0.0622 0.0725 0.1030 0.1421 0.1741
       15    0.0300  0.0306  0.0354 0.0432 0.0583 0.0808 0.1133 0.1530 0.1856
       20    0.0324  0.0334  0.0396 0.0487 0.0651 0.0897 0.1242 0.1643 0.1970
      </tableData>
     </table>
    </product>
    <value> 0.5 </value> <!-- The drag seems too high. -->
   </function>

   <function name="aero/coefficient/CDbeta">
    <description>Drag_due_to_side_slip</description>
    <!-- Based on NACA report 432 "Force measurements on a 1/40-scale model
         of the U.S. Airship Akron" by Hugh B. Freeman,
	 Table I bare hull - CD_beta=0.
	 I have made the additional assumption that the coefficients are
	 symmetric for positive and negative beta.
	 This table includes drag at zero beta.

	   CD = D / (q * (vol)^(2/3))

    -->
    <product>
     <property>aero/qbar-psf</property>
     <value> 36812.1 </value>
     <!-- Start CD = -->
     <table>
      <independentVar lookup="row">aero/qbar-psf</independentVar>
      <independentVar lookup="column">aero/mag-beta-deg</independentVar>
      <!-- mag-beta-deg >= 0 -->
      <!-- Note: qbar = 1.0 guessed. -->
      <tableData>
             0.0     3.0    6.0    9.0    12.0   15.0   18.0   20.0
       1.0   0.0000  0.0001 0.0031 0.0082 0.0156 0.0280 0.0430 0.0675
       12.5  0.0000  0.0001 0.0031 0.0082 0.0156 0.0280 0.0430 0.0675
       19.0  0.0000  0.0009 0.0029 0.0080 0.0153 0.0274 0.0426 0.0558
       25.6  0.0000  0.0001 0.0029 0.0080 0.0152 0.0270 0.0423 0.0547
      </tableData>
      <!-- original tableData>
             -20.0  -18.0  -15.0  -12.0  -9.0   -6.0   -3.0    0.0     3.0    6.0    9.0    12.0   15.0   18.0   20.0
       12.5  0.0873 0.0628 0.0478 0.0354 0.0280 0.0229 0.0208  0.0198  0.0208 0.0229 0.0280 0.0354 0.0478 0.0628 0.0873
       19.0  0.0751 0.0619 0.0467 0.0346 0.0273 0.0222 0.0202  0.0193  0.0202 0.0222 0.0273 0.0346 0.0467 0.0619 0.0751
       25.6  0.0737 0.0613 0.0460 0.0342 0.0270 0.0219 0.0200  0.0190  0.0200 0.0219 0.0270 0.0342 0.0460 0.0613 0.0737
      </tableData-->
     </table>
    </product>
    <value> 0.2 </value> <!-- The drag seems too high. -->
   </function>

  </axis>

  <!-- ================================================== -->
  <axis name="SIDE">

   <function name="aero/coefficient/CYbeta">
    <description>Side_force_due_to_beta</description>
    <!-- Based on NACA report 432 "Force measurements on a 1/40-scale model
         of the U.S. Airship Akron" by Hugh B. Freeman,
	 Table I bare hull.
	 I have made the additional assumption that the coefficients are
	 symmetric for positive and negative beta.

	   CY = Y / (q * (vol)^(2/3))

    -->
    <product>
     <property>aero/qbar-psf</property>
     <value> 36812.1 </value>
     <!-- Start CY = -->
     <table>
      <independentVar lookup="row">aero/qbar-psf</independentVar>
      <independentVar lookup="column">aero/beta-deg</independentVar>
      <!-- Note: qbar = 1.0 guessed. -->
      <tableData>
             -20.0  -18.0  -15.0  -12.0  -9.0   -6.0   -3.0    0.0  3.0   6.0   9.0   12.0  15.0  18.0  20.0
       1.0   -0.183 -0.155 -0.115 -0.080 -0.054 -0.029 -0.011  0.0  0.011 0.029 0.054 0.080 0.115 0.155 0.183
       12.5  -0.183 -0.155 -0.115 -0.080 -0.054 -0.029 -0.011  0.0  0.011 0.029 0.054 0.080 0.115 0.155 0.183
       19.0  -0.183 -0.155 -0.115 -0.080 -0.054 -0.029 -0.011  0.0  0.011 0.029 0.054 0.080 0.115 0.155 0.183
       25.6  -0.183 -0.155 -0.115 -0.080 -0.054 -0.029 -0.011  0.0  0.011 0.029 0.054 0.080 0.115 0.155 0.183
      </tableData>
     </table>
     <value>0.5</value>
    </product>
   </function>

   <function name="aero/coefficient/CYdr">
    <description>Side_force_due_to_vertical_fin_and_rudder</description>
    <!-- Based on NACA report 432 "Force measurements on a 1/40-scale model
         of the U.S. Airship Akron" by Hugh B. Freeman,
	 Table III-b - Table I for q = 19 and assuming symmetry.

	   CY = Y / (q * (vol)^(2/3))

    -->
    <product>
     <property>aero/qbar-psf</property>
     <value> 36812.1 </value>
     <!-- Start CY = -->
     <table>
      <independentVar lookup="row">fcs/rudder-pos-deg</independentVar>
      <independentVar lookup="column">aero/beta-deg</independentVar>
      <tableData>
            -20     0       20
       -20  -0.307  -0.060  0.151
       -15  -0.287  -0.045  0.166
       -10  -0.264  -0.030  0.185
       -5   -0.245  -0.015  0.205
       0    -0.224  0.0     0.224
       5    -0.205  0.015  0.245
       10   -0.185  0.029  0.264
       15   -0.166  0.044  0.287
       20   -0.151  0.061  0.307
      </tableData>
     </table>
     <value>0.5</value>
    </product>
   </function>

  </axis>

  <!-- ================================================== -->
  <axis name="LIFT">

   <function name="aero/coefficient/CLalpha">
    <description>Lift_due_to_alpha</description>
    <!-- Based on NACA report 432 "Force measurements on a 1/40-scale model
         of the U.S. Airship Akron" by Hugh B. Freeman,
	 Table III-b hull with mk II tail surfaces.
	 I have used q = 19.0.
	 This table includes the lift from the elevators.

	   CL = L / (q * (vol)^(2/3))

    -->
    <product>
     <property>aero/qbar-psf</property>
     <value> 36812.1 </value>
     <!-- Start CL = -->
     <table>
      <independentVar lookup="row">fcs/elevator-pos-deg</independentVar>
      <independentVar lookup="column">aero/alpha-deg</independentVar>
      <tableData>
             -3.0     0.0    3.0   6.0   9.0   12.0  15.0  18.0  20.0
       -20   -0.096  -0.060 -0.021 0.024 0.077 0.137 0.205 0.279 0.330
       -15   -0.081  -0.045 -0.006 0.039 0.092 0.153 0.222 0.297 0.349
       -10   -0.085  -0.030  0.008 0.053 0.105 0.167 0.237 0.313 0.368
       -5    -0.050  -0.015  0.023 0.067 0.119 0.182 0.253 0.331 0.388
       0     -0.038  0.0     0.038 0.081 0.135 0.199 0.271 0.351 0.407
       5     -0.021  0.015   0.053 0.097 0.152 0.216 0.289 0.370 0.428
       10    -0.006  0.029   0.067 0.113 0.170 0.235 0.308 0.390 0.447
       15     0.008  0.044   0.084 0.130 0.188 0.253 0.328 0.412 0.470
       20     0.024  0.061   0.101 0.149 0.206 0.277 0.351 0.432 0.490
      </tableData>
     </table>
    </product>
   </function>

  </axis>

  <!-- Moments =============================================== -->

  <!-- ================================================== -->
  <axis name="ROLL"> <!-- Totally off! -->
   <function name="aero/coefficient/Clp">
    <description>Roll_moment_due_to_roll_rate_(damping)</description>
    <!-- The current version is just a hack to make the craft stable. -->
    <product>
     <value> -10000000.0 </value>
     <!--property>aero/bi2vel</property-->
     <property>velocities/p-aero-rad_sec</property>
    </product>
   </function>
  </axis>

  <!-- ================================================== -->
  <axis name="PITCH">

   <function name="aero/coefficient/Cmq"> <!-- Totally off! -->
    <description>Pitch_moment_due_to_pitch_rate_(damping)</description>
    <!-- The current version is just a hack to make the craft stable. -->
    <product>
     <value> -10000.0 </value>
     <!--property>aero/ci2vel</property-->
     <property>velocities/q-aero-rad_sec</property>
    </product>
   </function>

   <function name="aero/coefficient/Cmalpha">
    <description>Pitch_moment_due_to_alpha</description>
    <!-- Based on NACA report 432 "Force measurements on a 1/40-scale model
         of the U.S. Airship Akron" by Hugh B. Freeman,
	 Table III-b hull with mk II tail surfaces.
	 I have made the additional assumption that the coefficients are
	 mostly symmetric for positive and negative alpha and used q = 19.0.
	 This table includes the pitch moment from the elevators.

	   Cm = M / (q * vol)

    -->
    <product>
     <property>aero/qbar-psf</property>
     <value> 7062940 </value>
     <!-- Start Cm = -->
     <table>
      <independentVar lookup="row">fcs/elevator-pos-deg</independentVar>
      <independentVar lookup="column">aero/alpha-deg</independentVar>
      <tableData>
             -3.0    0.0    3.0    6.0    9.0    12.0   15.0   18.0   20.0
       -20   0.057   0.093  0.128  0.158  0.173  0.176  0.173  0.162  0.151
       -15   0.039   0.077  0.113  0.142  0.156  0.162  0.157  0.142  0.127
       -10   0.019   0.056  0.090  0.117  0.135  0.140  0.131  0.113  0.097
       -5    -0.006  0.032  0.067  0.098  0.112  0.112  0.101  0.081  0.065
       0     -0.032  0.007  0.045  0.075  0.087  0.086  0.070  0.048  0.030
       5     -0.059  -0.017 0.020  0.048  0.060  0.057  0.038  0.013  -0.006
       10    -0.084  -0.042 -0.005 0.020  0.030  0.028  0.007  -0.020 -0.041
       15    -0.106  -0.064 -0.030 -0.007 -0.002 -0.008 -0.027 -0.055 -0.075
       20    -0.125  -0.085 -0.055 -0.036 -0.032 -0.043 -0.061 -0.087 -0.107
      </tableData>
     </table>
    </product>
   </function>

  </axis>

  <!-- ================================================== -->
  <axis name="YAW">

   <function name="aero/coefficient/Cnr"> <!-- Totally off! -->
    <description>Yaw_moment_due_to_yaw_rate_(damping)</description>
    <!-- The current version is just a hack to make the craft stable. -->
    <product>
     <value> -10000.0 </value>
     <!--property>aero/bi2vel</property-->
     <property>velocities/r-aero-rad_sec</property>
    </product>
   </function>

   <function name="aero/coefficient/Cndr">
    <description>Yaw_moment_due_to_vertical_fin_and_rudder</description>
    <!-- Based on NACA report 432 "Force measurements on a 1/40-scale model
         of the U.S. Airship Akron" by Hugh B. Freeman,
	 Table III-c - Table I for q = 19 and assuming symmetry.

	   Cn = M / (q * vol)

    -->
    <product>
     <property>aero/qbar-psf</property>
     <value> 7062940 </value>
     <!-- Start Cn = -->
     <table>
      <independentVar lookup="row">fcs/rudder-pos-deg</independentVar>
      <independentVar lookup="column">aero/beta-deg</independentVar>
      <tableData>
            -20    0       20
       -20  0.484  0.093   -0.227
       -15  0.452  0.077   -0.250
       -10  0.418  0.056   -0.280
       -5   0.383  0.032   -0.312
       0    0.347  0.0     -0.347
       5    0.312  -0.032  -0.383
       10   0.280  -0.056  -0.418
       15   0.250  -0.077  -0.452
       20   0.227  -0.093  -0.484
      </tableData>
     </table>
     <value>1.0</value>
    </product>
   </function>

   <function name="aero/coefficient/Cnbeta">
    <description>Yaw_moment_due_to_beta</description>
    <!-- Based on NACA report 432 "Force measurements on a 1/40-scale model
         of the U.S. Airship Akron".
	 I have made the additional assumption that the coefficients are
	 symmetric for positive and negative beta.

	   Cn = M / (q * vol)

    -->
    <product>
     <property>aero/qbar-psf</property>
     <value> 7062940 </value>
     <!-- Start Cm = -->
     <table>
      <independentVar lookup="row">aero/qbar-psf</independentVar>
      <independentVar lookup="column">aero/beta-deg</independentVar>
      <!-- Note: qbar = 1.0 guessed. -->
      <tableData>
             -20.0  -18.0  -15.0  -12.0  -9.0   -6.0   -3.0    0.0  3.0   6.0   9.0   12.0  15.0  18.0  20.0
       1.0   -0.377 -0.348 -0.307 -0.260 -0.212 -0.150 -0.078  0.0  0.078 0.150 0.212 0.260 0.307 0.348 0.377
       12.5  -0.377 -0.348 -0.307 -0.260 -0.212 -0.150 -0.078  0.0  0.078 0.150 0.212 0.260 0.307 0.348 0.377
       19.0  -0.377 -0.348 -0.307 -0.260 -0.212 -0.150 -0.078  0.0  0.078 0.150 0.212 0.260 0.307 0.348 0.377
       25.6  -0.377 -0.348 -0.307 -0.260 -0.212 -0.150 -0.078  0.0  0.078 0.150 0.212 0.260 0.307 0.348 0.377
      </tableData>
     </table>
     <value>1.0</value>
    </product>
   </function>

  </axis>

 </aerodynamics>

 <output name="LZ-129_datalog.csv" type="CSV" rate="1">
  <property> position/h-sl-ft </property>
  <property> velocities/vc-kts </property>
  <property> fcs/throttle-cmd-norm </property>
  <property> fcs/throttle-cmd-norm[1] </property>
  <property> fcs/throttle-cmd-norm[2] </property>
  <property> fcs/throttle-cmd-norm[3] </property>
  <property> fcs/elevator-cmd-norm </property>
  <property> fcs/pitch-trim-cmd-norm </property>
  <property> propulsion/total-fuel-lbs </property>
  <property> flight-path/gamma-rad </property>
  <property> accelerations/n-pilot-z-norm </property>
  <property> propulsion/gas-cell/temp-K </property>
  <property> propulsion/gas-cell/pressure-Pa </property>
  <property> propulsion/gas-cell/volume-m3 </property>
  <property> propulsion/gas-cell/buoyancy-N </property>
  <property> propulsion/gas-cell/contents-mol </property>
  <property> propulsion/gas-cell/valve_open </property>
  <property> propulsion/gas-cell[15]/temp-K </property>
  <property> propulsion/gas-cell[15]/pressure-Pa </property>
  <property> propulsion/gas-cell[15]/volume-m3 </property>
  <property> propulsion/gas-cell[15]/buoyancy-N </property>
  <property> propulsion/gas-cell[15]/contents-mol </property>
  <property> propulsion/gas-cell[15]/valve_open </property>
  <property> ap/heading-setpoint-degrees </property>
  <property> ap/pitch-setpoint-degrees </property>

  <rates> ON </rates>
  <velocities> ON </velocities>
  <forces> ON </forces>
  <moments> ON </moments>
  <position> ON </position>
  <fcs> ON </fcs>
  <propulsion> OFF </propulsion>
  <aerosurfaces> ON </aerosurfaces>
  <fcs> ON </fcs>
  <ground_reactions> ON </ground_reactions>
 </output>

</fdm_config>
